*Heading
** Job name: Job-2 Model name: Model-1
** Generated by: Abaqus/CAE Student Edition 2021
*Preprint, echo=NO, model=NO, history=NO, contact=NO
**
** PARTS
**
*Part, name=Part-5
*Node
      1,   105.464249,          8.5,           0.
      2,   329.464264,          8.5,           0.
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*Element, type=C3D8R
  1,  49,  30,   2,   8, 140, 121,  93,  99
  2,  90,  71,  48,   5, 181, 162, 139,  96
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*Nset, nset=Set-1, generate
   1,  728,    1
*Elset, elset=Set-1, generate
   1,  322,    1
** Section: Section-1
*Solid Section, elset=Set-1, material=Steel
,
*End Part
**
**
** ASSEMBLY
**
*Assembly, name=Assembly
**
*Instance, name=Part-5-1, part=Part-5
*End Instance
**
*Nset, nset=Set-2, instance=Part-5-1
   1,   2,   3,   4,   5,   6
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*Elset, elset=Set-2, instance=Part-5-1
   1,   4,  27,  47,  50,  73
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*End Assembly
**
** MATERIALS
**
*Material, name=Steel
*Density
 0.0830927,
*Elastic
 4.7862e+06, 0.2
**
** INTERACTION PROPERTIES
**
*Surface Interaction, name=IntProp-1
1.,
*Friction, slip tolerance=0.005
100.,
*Surface Behavior, pressure-overclosure=HARD
** ----------------------------------------------------------------
**
** STEP: load
**
*Step, name=load, nlgeom=NO
*Static
1., 1., 1e-05, 1.
**
** BOUNDARY CONDITIONS
**
** Name: BC-2 Type: Displacement/Rotation
*Boundary
Set-2, 1, 1
Set-2, 2, 2
Set-2, 3, 3
Set-2, 4, 4
Set-2, 5, 5
**
** OUTPUT REQUESTS
**
*Restart, write, frequency=0
**
** FIELD OUTPUT: F-Output-1
**
*Output, field, variable=PRESELECT
**
** HISTORY OUTPUT: H-Output-1
**
*Output, history, variable=PRESELECT
*End Step
** ----------------------------------------------------------------
**
** STEP: Step-2
**
*Step, name=Step-2, nlgeom=NO, perturbation
*Frequency, eigensolver=Lanczos, sim, acoustic coupling=on, normalization=mass
40, , , , ,
**
** OUTPUT REQUESTS
**
*Restart, write, frequency=0
**
** FIELD OUTPUT: F-Output-2
**
*Output, field, variable=PRESELECT
*End Step
